# -------------------- INITIALISATION --------------------
units           lj
dimension       2
atom_style      atomic
boundary        p m p

# -------------------- SYSTEM DEFINITION --------------------
# Define the total box where atoms will be created
lattice         hex 1
variable        Lx equal 100
region          full_box block -100 v_Lx -101 101 -0.1 0.1
create_box      3 full_box

# Create perturbed heavy top atoms
create_atoms    1 region full_box
mass            1    5

variable        A equal 15.0
variable        L equal "v_Lx"
variable        Y0 equal 0
variable        pi equal 3.141592653589793
variable        dl equal 1
variable        mode equal "v_pi/4"
variable        offset equal "3*v_pi/2"

variable        below_sine atom "y<(v_A*sin(v_mode*v_pi*x/v_L+v_offset)+v_Y0-v_dl)"
variable        above_sine atom "y>(v_A*sin(v_mode*v_pi*x/v_L+v_offset)+v_Y0+v_dl)"

delete_atoms    variable below_sine
delete_atoms    variable above_sine

# create light bottom atoms
region          top block -100 v_Lx 10 100 -0.1 0.1
region          bottom block -100 v_Lx -100 -10 -0.1 0.1
#region          interface block 0 20 24.9 25.1 -0.1 0.1z
lattice hex 0.8
create_atoms    2 region top
create_atoms    3 region bottom

mass            2    8.0
mass            3    2.0
#mass            3    2.0

# lennard jones potentials

pair_style      lj/cut 2.5
pair_coeff      1    1    1.0 1.0
pair_coeff      2    2    1.0 1.0
pair_coeff      3    3    1.0 1.0
pair_coeff      1    2    1.0 1.5
pair_coeff      1    3    1.0 1.5
pair_coeff      2    3    1.0 1.0 # reduce sigma between atoms for smaller interface

# reflective wall

group wall type 1
group fluids type 2 3
group heavy type 2
group light type 3

fix             freeze wall setforce 0.0 0.0 0.0
velocity        wall set 0.0 0.0 0.0


fix walllo all wall/lj93 ylo -101 1.0 1.0 1.0
fix wallhi all wall/lj93 yhi 101 1.0 1.0 1.0


# thermodynamics, equilibriate

velocity        fluids create 0.7 12345 mom yes rot no dist gaussian


thermo          10
thermo_style    custom step etotal press pe ke temp density

# equilibrium run

#minimize        1.0e-6 1.0e-6 1000 10000
dump            mydump all      atom 1000 rti2.lampstrj
timestep        0.005

fix int fluids nvt temp 0.7 0.7 1
restart         10000  restart_27.*.rst
run             100000
unfix int
fix int fluids nve
# gravity run


variable        gradient equal 3e-6
variable        gz equal "v_gradient*time"


fix             g    all     gravity v_gz vector 0.0 -1.0 0.0

delete_atoms    group wall


run             150000
